# OpenSim document version 40000
APDMDataReaderSettings:
  ExperimentalSensors:
    ExperimentalSensor Static: name_in_model=pelvis_imu
    ExperimentalSensor Upper_r: name_in_model=femur_r_imu
    ExperimentalSensor Middle_r: name_in_model=tibia_r_imu
    ExperimentalSensor Lower_r: name_in_model=calcn_r_imu
    ExperimentalSensor Upper_l: name_in_model=femur_l_imu
    ExperimentalSensor Middle_l: name_in_model=tibia_l_imu
    ExperimentalSensor Lower_l: name_in_model=calcn_l_imu
